matrA := [1.53, 1.61, 1.43; 2.35, 2.31, 2.07; 3.83, 3.73, 3.45]
matrB := [-5.13; -3.69; -5.98]
A := [1.53, 1.61, 1.43, -5.13; 2.35, 2.31, 2.07, -3.69; 3.83, 3.73, 3.45, -5.98]
T(n) :=
    for i ∈ 0 .. n - 1
        for j ∈ 0 .. n
            T[i, j] ← rnd(110)
    T
n := 50 .. 150
gaussn(n) :=
    start ← time(0)
    A ← T(n)
    for i ∈ 0 .. n - 2
        m ← i
        for k ∈ i + 1 .. n - 1
            m ← k if |A[k, i]| > |A[m, i]|
        for j ∈ i .. n
            z ← A[i, j]
            A[i, j] ← A[m, j]
            A[m, j] ← z
        c ← A[i, i]
        for j ∈ i .. n
            A[i, j] ← A[i, j]/c
        for k ∈ i + 1 .. n - 1
            b ← A[k, i]
            for l ∈ i .. n
                A[k, l] ← A[k, l] - b*A[i, l]
    x[n - 1] ← A[n - 1, n]/A[n - 1, n - 1]
    k ← n - 2
    while k ≥ 0
        s ← 0
        for j ∈ k + 1 .. n - 1
            s ← s + A[k, j]*x[j]
        x[k] ← A[k, n] - s
        k ← k - 1
    h ← submatrix(A, 0, n - 1, 0, n - 1)*x
    H ← submatrix(A, 0, n - 1, 0, n - 1)^-1*submatrix(A, 0, n - 1, 0, n - 1)*A[:, n]
    δ ← 1/(n - 1)*sqrt(sum((H[o] - h[o])^2, o = 0 .. n - 1))
    Q[0] ← δ
    Q[1] ← time(0) - start
    Q
gaussE(n, e) :=
    start ← time(0)
    A ← T(n)
    for i ∈ 0 .. n - 2
        m ← i
        for k ∈ i + 1 .. n - 1
            m ← k if |A[k, i]| > |A[m, i]|
        for j ∈ i .. n
            z ← A[i, j]
            A[i, j] ← A[m, j]
            A[m, j] ← z
        c ← A[i, i]
        for j ∈ i .. n
            A[i, j] ← round(A[i, j]/c, e)
        for k ∈ i + 1 .. n - 1
            b ← A[k, i]
            for l ∈ i .. n
                A[k, l] ← round(A[k, l] - b*A[i, l], e)
    x[n - 1] ← round(A[n - 1, n]/A[n - 1, n - 1], e)
    k ← n - 2
    while k ≥ 0
        s ← 0
        for j ∈ k + 1 .. n - 1
            s ← round(s + A[k, j]*x[j], e)
        x[k] ← round(A[k, n] - s, e)
        k ← k - 1
    h ← submatrix(A, 0, n - 1, 0, n - 1)*x
    H ← submatrix(A, 0, n - 1, 0, n - 1)^-1*submatrix(A, 0, n - 1, 0, n - 1)*A[:, n]
    δ ← 1/(n - 1)*sqrt(sum((H[o] - h[o])^2, o = 0 .. n - 1))
    Q[0] ← δ
    Q[1] ← time(0) - start
    Q
gauss(A, n) :=
    start ← time(0)
    for i ∈ 0 .. n - 2
        m ← i
        for k ∈ i + 1 .. n - 1
            m ← k if |A[k, i]| > |A[m, i]|
        for j ∈ i .. n
            z ← A[i, j]
            A[i, j] ← A[m, j]
            A[m, j] ← z
        c ← A[i, i]
        for j ∈ i .. n
            A[i, j] ← A[i, j]/c
        for k ∈ i + 1 .. n - 1
            b ← A[k, i]
            for l ∈ i .. n
                A[k, l] ← A[k, l] - b*A[i, l]
    x[n - 1] ← A[n - 1, n]/A[n - 1, n - 1]
    for k ∈ n - 2 .. 0
        s ← 0
        for j ∈ k + 1 .. n - 1
            s ← s + A[k, j]*x[j]
        x[k] ← A[k, n] - s
    for i ∈ 0 .. n - 1
        X[i] ← x[i]
    X
gauss(A, cols(A) - 1) = [24.6968; -19.2532; -8.33452]
rref(A) = [1, 0, 0, 24.6968; 0, 1, 0, -19.2532; 0, 0, 1, -8.33452]
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